f(t, a, b) := Γ(a + b)*t^(a - 1)*(1 - t)^(b - 1)/(Γ(a)*Γ(b))
F(t, a, b) := integral(f(t, a, b), t = 0 .. t)
j := 0, 1 .. 10000
div := 100
N1[j] := F(j/div, 0.5, 0.5)
N2[j] := F(j/div, 5, 1)
N3[j] := F(j/div, 2, 5)
inv(n, range) :=
    for i ∈ 0 .. last(range)
        return i/div if range[i] > n
    0
N0 := 10000
v := 0 .. N0 - 1
a := 0
b := 1
Y := runif(N0, a, b)
X1[v] := inv(Y[v], N1)
X2[v] := inv(Y[v], N2)
X3[v] := inv(Y[v], N3)
X1 := sort(X1)
X2 := sort(X2)
X3 := sort(X3)
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N(t, X) :=
    i ← 0
    while t > X[i]
        i ← i + 1
    N0 - i
h := 0.02
T1max := round(max(X1)/h, 0)
T2max := round(max(X2)/h, 0)
T3max := round(max(X3)/h, 0)
i1 := 0 .. T1max
i2 := 0 .. T2max
i3 := 0 .. T3max
T1[i1] := i1*h
T2[i2] := i2*h
T3[i3] := i3*h
i1 := 0 .. T1max - 1
i2 := 0 .. T2max - 1
i3 := 0 .. T3max - 1
P3[i3] := N(T3[i3], X3)/N0
P1[i1] := N(T1[i1], X1)/N0
P2[i2] := N(T2[i2], X2)/N0
P1[T1max] := 0
P2[T2max] := 0
P3[T3max] := 0
P(t, a, b) := 1 - F(t, a, b)
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Q1[i1] := (N0 - N(T1[i1], X1))/N0
Q2[i2] := (N0 - N(T2[i2], X2))/N0
Q3[i3] := (N0 - N(T3[i3], X3))/N0
Q(t, a, b) := F(t, a, b)
# Теоретический вид
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# Статистический вид
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# Функция частоты
i1 := 0 .. T1max - 2
i2 := 0 .. T2max - 2
i3 := 0 .. T3max - 2
f3[i3] := (N(T3[i3], X3) - N(T3[i3] + h, X3))/(N0*h)
f1[i1] := (N(T1[i1], X1) - N(T1[i1] + h, X1))/(N0*h)
f2[i2] := (N(T2[i2], X2) - N(T2[i2] + h, X2))/(N0*h)
# Теоретический вид
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# Статистический вид
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# Функция интенсивности
λ(t, a, b) := f(t, a, b)/P(t, a, b)
λ1[i1] := (N(T1[i1], X1) - N(T1[i1] + h, X1))/(N(T1[i1], X1)*h)
λ2[i2] := (N(T2[i2], X2) - N(T2[i2] + h, X2))/(N(T2[i2], X2)*h)
λ3[i3] := (N(T3[i3], X3) - N(T3[i3] + h, X3))/(N(T3[i3], X3)*h)
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# Теоретический вид
# Статический вид
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