ORIGIN := 1
n := 18
t := sort(rexp(n, 0.05))
i := 1 .. n
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E0 := 25
Kjm := 0.05
Given
sum(1/(E0 - (i - 1)) - Kjm*t[i], i = 1 .. n) == 0
t := [0.064; 0.231; 0.902; 2.649; 2.965; 4.884; 4.978; 9.837; 10.158; 12.348; 12.635; 13.083; 15.441; 15.935; 35.885; 42.559; 57.274; 94.383]
sum(1/Kjm - (E0 - (i - 1))*t[i], i = 1 .. n) == 0
[Kjm; E0] := Minerr(Kjm, E0) = [0.059029; 14.7684]
Kjm = 0.059029
E0 = 14.7684
λ(i) := Kjm*(E0 - (i - 1))
λ(n + 1) = -0.190759
m := 1/λ(n + 1) = -5.24221
P := e^(-λ(n + 1)*m) = 0.367879
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